<?xml version="1.0"?>
<?xml-stylesheet type="text/xsl" href="http://jsbsim.sourceforge.net/JSBSim.xsl"?>
<fdm_config name="F-20" version="2.0" release="ALPHA"
   xmlns:xsi="http://www.w3.org/2001/XMLSchema-instance"
   xsi:noNamespaceSchemaLocation="http://jsbsim.sourceforge.net/JSBSim.xsd">

 <fileheader>
  <author> Aeromatic v 0.95 </author>
  <filecreationdate>2012-12-02</filecreationdate>
  <version>$Revision: 1.15 $</version>
  <description> Models a F-20. </description>
 </fileheader>

<!--
  File:     F-20.xml
  Inputs:
    name:          F-20
    type:          single-engine transonic/supersonic fighter
    max weight:    27504.70695 lb
    wing span:     27.98693 ft
    length:        47.2464 ft
    wing area:     200.2282746 sq-ft
    gear type:     tricycle
    retractable?:  yes
    # engines:     1
    engine type:   turbine
    engine layout: aft fuselage
    yaw damper?    no

  Outputs:
    wing loading:  137.37 lb/sq-ft
    payload:       9671.7 lbs
    CL-alpha:      3.5 per radian
    CL-0:          0.08
    CL-max:        1
    CD-0:          0.021
    K:             0.12

-->

 <metrics>
   <wingarea  unit="FT2">  200.23 </wingarea>
   <wingspan  unit="FT" >   28.0 </wingspan>
   <wing_incidence>          2.00 </wing_incidence>
   <chord     unit="FT" >    7.15 </chord>
   <htailarea unit="FT2">   38.8 </htailarea>
   <htailarm  unit="FT" >    13.41 </htailarm>
   <vtailarea unit="FT2">   53.82 </vtailarea>
   <vtailarm  unit="FT" >    11.0 </vtailarm>
   <location name="AERORP" unit="IN">
     <!--<x> 8.22 </x>-->
     <x>-15.0</x>
     <y> 0.00 </y>
     <z> -18.14 </z>
   </location>
   <location name="EYEPOINT" unit="IN">
     <x> -129.08 </x>
     <y>   0.00 </y>
     <z> 19.24 </z>
   </location>
   <location name="VRP" unit="IN">
     <x>0</x>
     <y>0</y>
     <z>0</z>
   </location>
 </metrics>

 <mass_balance>
   <ixx unit="SLUG*FT2">      5930 </ixx>
   <iyy unit="SLUG*FT2">     28400 </iyy>
   <izz unit="SLUG*FT2">     23514 </izz>
   <emptywt unit="LBS" >     13800 </emptywt>
   <location name="CG" unit="IN">
     <x> 0.00</x>
     <y> 0.00 </y>
     <z> 0.00 </z>
   </location>

   <pointmass name="left-tip-load">
		<weight unit="KG">0</weight>
		<location unit="M">
			<x> 0.9112 </x>
			<y> -4 </y>
			<z> -0.4512 </z>
		</location>
   </pointmass>

   <pointmass name="outer-left-load">
		<weight unit="KG">0</weight>
		<location unit="M">
			<x> 0.2114 </x>
			<y> -3.0177 </y>
			<z> -0.9844 </z>
		</location>
   </pointmass>

   <pointmass name="inner-left-load">
		<weight unit="KG">0</weight>
		<location unit="M">
			<x> 0.2534 </x>
			<y> -2.319 </y>
			<z> -0.9844 </z>
		</location>
   </pointmass>

   <pointmass name="center-load">
		<weight unit="KG">0</weight>
		<location unit="M">
			<x> -1.2576 </x>
			<y> 0 </y>
			<z> -1.0717 </z>
		</location>
   </pointmass>

  <pointmass name="inner-right-load">
		<weight unit="KG">0</weight>
		<location unit="M">
			<x> 0.2534 </x>
			<y> 2.319 </y>
			<z> -0.9844 </z>
		</location>
   </pointmass>

   <pointmass name="outer-right-load">
		<weight unit="KG">0</weight>
		<location unit="M">
			<x> 0.2114 </x>
			<y> 3.0177 </y>
			<z> -0.9844 </z>
		</location>
   </pointmass>

   <pointmass name="right-tip-load">
		<weight unit="KG">0</weight>
		<location unit="M">
			<x> 0.9112 </x>
			<y> 4 </y>
			<z> -0.4512 </z>
		</location>
   </pointmass>

 </mass_balance>

 <ground_reactions>

  <contact type="BOGEY" name="NOSE">
   <location unit="IN">
     <x>  -186.87 </x>
     <y>   0.00 </y>
     <z> -78.59 </z>
   </location>
   <static_friction>  0.80 </static_friction>
   <dynamic_friction> 0.50 </dynamic_friction>
   <rolling_friction> 0.02 </rolling_friction>
   <spring_coeff unit="LBS/FT">      6000.0 </spring_coeff>
   <damping_coeff unit="LBS/FT/SEC"> 5000.0 </damping_coeff>
   <max_steer unit="DEG"> 5.00 </max_steer>
   <brake_group>NONE</brake_group>
   <retractable>1</retractable>
  </contact>

  <contact type="BOGEY" name="LEFT_MAIN">
   <location unit="IN">
     <x> 19.98 </x>
     <y>  -70.87 </y>
     <z> -82.49 </z>
   </location>
   <static_friction>  0.80 </static_friction>
   <dynamic_friction> 0.50 </dynamic_friction>
   <rolling_friction> 0.02 </rolling_friction>
   <spring_coeff unit="LBS/FT">     17000.0 </spring_coeff>
   <damping_coeff unit="LBS/FT/SEC"> 5000.0 </damping_coeff>
   <max_steer unit="DEG">0</max_steer>
   <brake_group>LEFT</brake_group>
   <retractable>1</retractable>
  </contact>

  <contact type="BOGEY" name="RIGHT_MAIN">
   <location unit="IN">
     <x> 19.98 </x>
     <y>  70.87 </y>
     <z> -82.49 </z>
   </location>
   <static_friction>  0.80 </static_friction>
   <dynamic_friction> 0.50 </dynamic_friction>
   <rolling_friction> 0.02 </rolling_friction>
   <spring_coeff unit="LBS/FT">     17000.0 </spring_coeff>
   <damping_coeff unit="LBS/FT/SEC"> 5000.0 </damping_coeff>
   <max_steer unit="DEG">0</max_steer>
   <brake_group>RIGHT</brake_group>
   <retractable>1</retractable>
  </contact>

  <contact type="STRUCTURE" name="LEFT_WING">
    <location unit="IN">
     <x> 25.10</x>
     <y> -156.2 </y>
     <z> -19.81 </z>
    </location>
    <static_friction>  1.00 </static_friction>
    <dynamic_friction> 1.00 </dynamic_friction>
    <spring_coeff unit="LBS/FT">      27504.71 </spring_coeff>
    <damping_coeff unit="LBS/FT/SEC"> 27504.71 </damping_coeff>
  </contact>

  <contact type="STRUCTURE" name="RIGHT_WING">
    <location unit="IN">
     <x> 25.10</x>
     <y> 156.2 </y>
     <z> -19.81 </z>
    </location>
    <static_friction>  1.00 </static_friction>
    <dynamic_friction> 1.00 </dynamic_friction>
    <spring_coeff unit="LBS/FT">      27504.71 </spring_coeff>
    <damping_coeff unit="LBS/FT/SEC"> 27504.71 </damping_coeff>
  </contact>

 </ground_reactions>

 <propulsion>

   <engine file="F404-GE-402">
    <location unit="IN">
      <x> 234.14</x>
      <y>   0.00 </y>
      <z>   0.00 </z>
    </location>
    <orient unit="DEG">
      <pitch> 0.00 </pitch>
      <roll>  0.00 </roll>
      <yaw>   0.00 </yaw>
    </orient>
    <feed>0</feed>
 <!--   <feed>1</feed>-->
    <thruster file="direct">
     <location unit="IN">
       <x> 234.14</x>
       <y>   0.00 </y>
       <z>   0.00 </z>
     </location>
     <orient unit="DEG">
       <pitch> 0.00 </pitch>
       <roll>  0.00 </roll>
       <yaw>   0.00 </yaw>
     </orient>
    </thruster>
  </engine>

  <tank type="FUEL" number="0">
     <location unit="IN">
       <x> 20 </x>
       <y> 0.00 </y>
       <z> 0.0 </z>
     </location>
     <capacity unit="LBS"> 1747 </capacity>
     <contents unit="LBS"> 1747 </contents>
  </tank>

  <tank type="FUEL" number="1">
     <location unit="IN">
       <x> -20 </x>
       <y> 0.00 </y>
       <z> 0.0 </z>
     </location>
     <capacity unit="LBS"> 2768 </capacity>
     <contents unit="LBS"> 2768 </contents>
  </tank>

  <!--Center drop tank -->
    <tank type="FUEL" number="2">
     <location unit="IN">
       <x> -36.84252 </x>
       <y> 0.00 </y>
       <z> -46.016929 </z>
     </location>
     <capacity unit="LBS"> 2085 </capacity>
     <contents unit="LBS"> 2085 </contents>
  </tank>

  <!--Left drop tank -->
    <tank type="FUEL" number="3">
     <location unit="IN">
       <x> 19.774409 </x>
       <y> -91.253543 </y>
       <z> -42.603937 </z>
     </location>
     <capacity unit="LBS"> 1995 </capacity>
     <contents unit="LBS"> 1995 </contents>
  </tank>

    <!--Right drop tank -->
    <tank type="FUEL" number="4">
     <location unit="IN">
       <x> 19.774409 </x>
       <y> 91.253543 </y>
       <z> -42.603937 </z>
     </location>
     <capacity unit="LBS"> 1995 </capacity>
     <contents unit="LBS"> 1995 </contents>
  </tank>

 </propulsion>

 <external_reactions>
    <!-- Nose hike/dehike -->
      <force name="hike_fwd" frame="BODY">
	    <function name="hike_fwd">
          <description>nose gear hike forward</description>
          <product>
		   <property>/gear/hiking/hiked</property>
		   <value>-750.0</value>
		  </product>
        </function>
         <location unit="IN">
		  <x>  -186.87 </x>
		  <y>   0.00 </y>
		  <z> -78.59 </z>
   	     </location>
	  <direction>
            <x> 0 </x>
            <y> 0 </y>
            <z> 1 </z>
          </direction>
       </force>

      <force name="hike_aft" frame="BODY">
	    <function name="hike_aft">
          <description>nose gear hike aft</description>
          <product>
		   <property>/gear/hiking/hiked</property>
		   <value>750.0</value>
		  </product>
        </function>
         <location unit="IN">
		  <x>  186.87 </x>
		  <y>   0.00 </y>
		  <z> -78.59 </z>
   	     </location>
	  <direction>
            <x> 0 </x>
            <y> 0 </y>
            <z> 1 </z>
          </direction>
       </force>
</external_reactions>

 <flight_control file="F-20C-fcs"/>


<!-- Aerodynamics +++++++++++++++++++++++++++++++++++++++++++++++++++ -->

 <aerodynamics>


  <!-- Helper Functions -->
    <function name="aero/tail-alpha-rad">
      <description>Local incidence of the tail plane</description>
      <sum>
          <property> aero/alpha-rad</property>
          <property>fcs/elevator-pos-rad</property>
      </sum>
    </function>

    <!-- hack to get a sine function from JSBSim for the flares ! -->
    <function name="/f-20/time-sine">
      <description>sine of times</description>
      <sin>
          <product>
          <property>sim-time-sec</property>
          <value>31.14</value>
          </product>
      </sin>
    </function>


    <function name="aero/beta-prime-rad">
      <description>Corrected beta for fuselage side lift computation</description>
        <table>
            <independentVar lookup="row">aero/beta-rad</independentVar>
            <tableData>
                -3.141592654	0
                -1.570796327	-1.570796327
				0	0
				1.570796327	1.570796327
				3.141592654	0
            </tableData>
        </table>
    </function>

     <function name="aero/tail-blanking">
      <description>wing/fuselage blanking for the tail</description>

           <table>
            <independentVar lookup="row">aero/alpha-rad</independentVar>
            <tableData>
                -3.14    1.0
                -0.0     1.0
                0.175    0.7
                0.436    0.3
                0.611    0.15
                0.785    0.1
                1.571    0.1
                1.920    0.3
                2.094    0.7
                2.531    0.9
                3.14     1.0
            </tableData>
          </table>
        </function>

  <!-- pseudo center of pressure -->
  <function name="aero/moment-arm">
      <description>pseudo center of pressure</description>
      <sum>
      <value>-1.65</value> <!-- anchor point corresponds to mid-chord -->
      <product>
         <value>5.0</value> <!-- pseudo chord -->
         <!-- alpha effect -->
         <table>
            <independentVar lookup="row">aero/alpha-rad</independentVar>
            <tableData>
				-3.14159265358979	-1
				-2.53072741539178	-0.95
				-2.44346095279206	-0.9
				-1.91986217719376	-0.1
				-1.83259571459405	-0.03
				-1.5707963267949	0
				-1.30899693899575	0.03
				-1.22173047639603	0.05
				-1.13446401379631	0.15
				-1.0471975511966	0.3
				-0.872664625997165	0.7
				-0.820304748437335	0.77
				-0.785398163397448	0.8
				-0.392699081698724	0.95
				0	1
				0.392699081698724	0.95
				0.785398163397448	0.8
				0.820304748437335	0.77
				0.872664625997165	0.7
				1.0471975511966	0.3
				1.13446401379631	0.15
				1.22173047639603	0.05
				1.30899693899575	0.03
				1.5707963267949	0
				1.83259571459405	-0.03
				1.91986217719376	-0.1
				2.44346095279206	-0.9
				2.53072741539178	-0.95
				3.14159265358979	-1
            </tableData>
          </table>
          <!-- mach effect -->
          <table>
            <independentVar lookup="row">velocities/mach</independentVar>
            <tableData>
                0.0    0.25
                0.8    0.25
                1.2    0.0
            </tableData>
          </table>
       </product>
       </sum>
  </function>

      <function name="aero/vertical-fin-lift">
       <description>Yaw moment due to beta</description>
       <!--fin -->
       <product>
           <property>aero/qbar-psf</property>
           <property>metrics/Sv-sqft</property>
           <!--lift coefficient for the vertical tail -->
           <table>
            <independentVar lookup="row">aero/beta-rad</independentVar>
            <tableData>
				-3.141592654	-0.03
                -2.967059728	0.8
				-2.617993878	0.95
				-2.094395102	0.6
				-1.570796327	0.0
				-1.047197551	-1.6
				-0.610865238	-2
                -0.296705973	-1.4
				-0.235619449	-1.341
				-0.122173048	-0.7629
				0.052359878		0.3681
				0.20943951		1.2941
				0.27925268		1.38
				0.436332313		1.7
				0.698131701		1.95
				1.221730476		1.2
				1.745329252		-0.4
				2.268928028		-0.75
				2.792526803		-1.2
				3.141592654		0
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            </tableData>
          </table>
        <property>aero/tail-blanking</property>
       </product>
    </function>

  <!-- Forces -->
  <axis name="LIFT">

    <function name="aero/force/Lift_alpha">
      <description>Lift due to alpha</description>
      <product>
          <property>aero/qbar-psf</property>
          <property>metrics/Sw-sqft</property>
          <table>
            <independentVar lookup="row">aero/alpha-rad</independentVar>
            <tableData>
				-3.141592654	-0.03
				-3.054326191	0.5
				-2.792526803	1
				-2.268928028	0.6
				-1.745329252	0.25
				-1.221730476	-0.8
				-0.698131701	-1.75
				-0.436332313	-1.5
				-0.261799388	-1.28
				0.052359878		0.3681
				0.20943951		1.2941
				0.27925268		1.38
				0.436332313		1.7
				0.698131701		1.95
				1.221730476		1.2
				1.745329252		-0.4
				2.268928028		-0.75
				2.792526803		-1.2
				3.141592654		-0.03
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            </tableData>
          </table>
      </product>
    </function>

    <function name="aero/force/Lift_flap">
       <description>Delta Lift due to flaps</description>
       <product>
           <property>aero/qbar-psf</property>
           <property>metrics/Sw-sqft</property>
           <property>fcs/te-flap-pos-deg</property>
           <value> 0.01167 </value>
       </product>
    </function>

    <function name="aero/force/Lift_speedbrake">
       <description>Delta Lift due to speedbrake</description>
       <product>
           <property>aero/qbar-psf</property>
           <property>metrics/Sw-sqft</property>
           <property>fcs/speedbrake-pos-norm</property>
           <value>0</value>
       </product>
    </function>

    <function name="aero/force/Lift_elevator">
       <description>Lift due to Elevator Deflection</description>
       <product>
           <property>aero/qbar-psf</property>
           <property>metrics/Sh-sqft</property>
          <table>
            <independentVar lookup="row">aero/tail-alpha-rad</independentVar>
            <tableData>
                -3.1415926536	0
                -2.9670597284	1.4
                -2.7925268032	1.3
                -2.617993878	0.9
                -2.4434609528	1.1
                -2.2689280276	0.9
                -2.0943951024	0.7
                -1.9198621772	0.5
                -1.745329252	0.24
                -1.5707963268	-0.01
                -1.3962634016	-0.25
                -1.2217304764	-0.5
                -1.0471975512	-0.7
                -0.872664626	-0.9
                -0.6981317008	-1.1
                -0.5235987756	-0.9
                -0.3490658504	-1.4
                -0.2617993878	-1.5
                -0.1745329252	-1.1
                -0.0872664626	-0.55
                0	0
                0.0872664626	0.55
                0.1745329252	1.1
                0.2617993878	1.5
                0.3490658504	1.4
                0.5235987756	0.9
                0.6981317008	1.1
                0.872664626	0.9
                1.0471975512	0.7
                1.2217304764	0.5
                1.3962634016	0.25
                1.5707963268	0.01
                1.745329252	-0.24
                1.9198621772	-0.5
                2.0943951024	-0.7
                2.2689280276	-0.9
                2.4434609528	-1.1
                2.617993878	-0.9
                2.7925268032	-1.3
                2.9670597284	-1.4
                3.1415926536	0
            </tableData>
          </table>
       </product>
    </function>

  </axis>

  <axis name="DRAG">

    <function name="aero/force/Drag_basic">
       <description>Drag at zero lift</description>
       <product>
          <property>aero/qbar-psf</property>
          <property>metrics/Sw-sqft</property>
          <sum>
          <table>
            <independentVar lookup="row">aero/alpha-rad</independentVar>
            <tableData>
             -1.57    1.500
             -0.26    0.027
              0.00    0.021
              0.26    0.027
              1.57    1.500
            </tableData>
          </table>
          <product>
              <property>aero/drag-index</property>
              <value>1e-4</value>
          </product>
          </sum>
       </product>
    </function>

    <function name="aero/force/Drag_induced">
       <description>Induced drag</description>
         <product>
           <property>aero/qbar-psf</property>
           <property>metrics/Sw-sqft</property>
           <property>aero/cl-squared</property>
           <value>0.12</value>
         </product>
    </function>

    <function name="aero/force/Drag_mach">
       <description>Drag due to mach</description>
        <product>
          <property>aero/qbar-psf</property>
          <property>metrics/Sw-sqft</property>
          <table>
            <independentVar lookup="row">velocities/mach</independentVar>
            <tableData>
                0.00      0.000
                0.81      0.000
                0.98      0.026
                1.10      0.026
                1.20      0.018
                1.80      0.015
            </tableData>
          </table>
        </product>
    </function>

    <function name="aero/force/Drag_flap">
       <description>Drag due to flaps</description>
         <product>
           <property>aero/qbar-psf</property>
           <property>metrics/Sw-sqft</property>
           <property>fcs/te-flap-pos-deg</property>
           <value> 0.00267 </value>
         </product>
    </function>

    <function name="aero/force/Drag_gear">
       <description>Drag due to gear</description>
         <product>
           <property>aero/qbar-psf</property>
           <property>metrics/Sw-sqft</property>
           <property>gear/gear-pos-norm</property>
           <value>0.02</value>
         </product>
    </function>

    <function name="aero/force/Drag_speedbrake">
       <description>Drag due to speedbrakes</description>
         <product>
           <property>aero/qbar-psf</property>
           <property>metrics/Sw-sqft</property>
           <property>fcs/speedbrake-pos-norm</property>
           <value>0.075</value>
         </product>
    </function>

    <function name="aero/force/Drag_brakechute">
       <description>Drag due to brake chute</description>
         <product>
           <property>aero/qbar-psf</property>
           <property>metrics/Sw-sqft</property>
           <property>fcs/chute-deployement-norm</property>
           <value>1.0</value>
         </product>
    </function>

    <function name="aero/force/Drag_beta">
       <description>Drag due to sideslip</description>
       <product>
          <property>aero/qbar-psf</property>
          <property>metrics/Sw-sqft</property>
          <table>
            <independentVar lookup="row">aero/beta-rad</independentVar>
            <tableData>
              -1.57    1.230
              -0.26    0.050
               0.00    0.000
               0.26    0.050
               1.57    1.230
            </tableData>
          </table>
       </product>
    </function>

    <function name="aero/force/Drag_elevator">
       <description>Drag due to Elevator Deflection</description>
       <product>
           <property>aero/qbar-psf</property>
           <property>metrics/Sh-sqft</property>
           <table>
            <independentVar lookup="row">aero/tail-alpha-rad</independentVar>
            <tableData>
             -3.14    0.021
             -1.57    1.500
             -0.26    0.027
              0.00    0.021
              0.26    0.027
              1.57    1.500
              3.14    0.021
            </tableData>
          </table>
       </product>
    </function>

  </axis>

  <axis name="SIDE">

    <function name="aero/force/Side_beta">
       <description>Side force due to beta</description>
       <product>
           <property>aero/qbar-psf</property>
           <property>metrics/Sw-sqft</property>
           <property>aero/beta-rad</property>
           <value>-1</value>
       </product>
    </function>

  </axis>


  <!-- Moments -->

  <axis name="ROLL">

    <function name="aero/moment/Roll_beta">
       <description>Roll moment due to beta</description>
       <product>
           <property>aero/qbar-psf</property>
           <property>metrics/Sw-sqft</property>
           <property>metrics/bw-ft</property>
           <property>aero/beta-rad</property>
           <value>-0.2</value> <!-- -0.1-->
       </product>
    </function>

    <function name="aero/moment/Roll_damp">
       <description>Roll moment due to roll rate</description>
       <product>
           <property>aero/qbar-psf</property>
           <property>metrics/Sw-sqft</property>
           <property>metrics/bw-ft</property>
           <property>aero/bi2vel</property>
           <property>velocities/p-aero-rad_sec</property>
           <value>-0.4</value>
       </product>
    </function>

    <function name="aero/moment/Roll_yaw">
       <description>Roll moment due to yaw rate</description>
       <product>
           <property>aero/qbar-psf</property>
           <property>metrics/Sw-sqft</property>
           <property>metrics/bw-ft</property>
           <property>aero/bi2vel</property>
           <property>velocities/r-aero-rad_sec</property>
           <value>0.15</value><!--0.15-->
       </product>
    </function>

    <function name="aero/moment/Roll_aileron">
       <description>Roll moment due to aileron</description>
       <product>
          <property>aero/qbar-psf</property>
          <property>metrics/Sw-sqft</property>
          <property>metrics/bw-ft</property>
          <property>fcs/left-aileron-pos-rad</property>
          <value>0.15</value>
          <!-- blanking of ailerons due to wingtip stall -->
          <table>
            <independentVar lookup="row">aero/alpha-rad</independentVar>
            <tableData>
				-3.1415926536	1
				-2.8797932658	1
				-2.617993878	0.2
				-1.5707963268	0
				-0.5235987756	0.2
				-0.2617993878	1
                0	1
                0.2617993878	1
                0.5235987756	0.2
                1.5707963268	0
                2.617993878	0.2
                2.8797932658	1
                3.1415926536	1
            </tableData>
          </table>
       </product>
    </function>

    <function name="aero/moment/Roll_rudder">
       <description>Roll moment due to rudder</description>
       <product>
           <property>aero/qbar-psf</property>
           <property>metrics/Sw-sqft</property>
           <property>metrics/bw-ft</property>
           <property>fcs/rudder-pos-rad</property>
           <value>0.01</value>
       </product>
    </function>

  </axis>

  <axis name="PITCH">

 <!--   <function name="aero/moment/Pitch_alpha">
       <description>Pitch moment due to alpha</description>
       <product>
           <property>aero/qbar-psf</property>
           <property>metrics/Sw-sqft</property>
           <property>metrics/cbarw-ft</property>
           <property>aero/alpha-rad</property>
           <value>-0.02</value>
       </product>
    </function>-->

    <function name="aero/moment/Pitch_alpha">
       <description>Pitch moment due to alpha</description>
       <product>
           <property>aero/force/Lift_alpha</property>
           <property>aero/moment-arm</property>
       </product>
    </function>


    <function name="aero/moment/Pitch_elevator">
       <description>Pitch moment due to elevator</description>
       <product>
	    <property>metrics/lh-ft</property>
		<value>-1.0</value>
	    <sum>
	      <product>
           <property>aero/force/Lift_elevator</property>
		   <cos><property>aero/alpha-rad</property></cos>
		  </product>
		  <product>
		   <property>aero/force/Drag_elevator</property>
		   <sin><property>aero/alpha-rad</property></sin>
		  </product>
		 </sum>
       </product>
    </function>

    <function name="aero/moment/Pitch_damp">
       <description>Pitch moment due to pitch rate</description>
       <product>
           <property>aero/qbar-psf</property>
           <property>metrics/Sw-sqft</property>
           <property>metrics/cbarw-ft</property>
           <property>aero/ci2vel</property>
           <property>velocities/q-aero-rad_sec</property>
           <value>-18</value>
       </product>
    </function>

    <function name="aero/moment/Pitch_alphadot">
       <description>Pitch moment due to alpha rate</description>
       <product>
           <property>aero/qbar-psf</property>
           <property>metrics/Sw-sqft</property>
           <property>metrics/cbarw-ft</property>
           <property>aero/ci2vel</property>
           <property>aero/alphadot-rad_sec</property>
           <value>-9</value>
       </product>
    </function>

  </axis>

  <axis name="YAW">

    <function name="aero/moment/Yaw_beta">
       <description>Yaw moment due to beta</description>
       <!--fin -->
       <product>
           <property>aero/vertical-fin-lift</property>
           <property>metrics/lv-ft</property>
       </product>
    </function>

    <function name="aero/moment/Yaw_damp">
       <description>Yaw moment due to yaw rate</description>
       <product>
           <property>aero/qbar-psf</property>
           <property>metrics/Sw-sqft</property>
           <property>metrics/bw-ft</property>
           <property>aero/bi2vel</property>
           <property>velocities/r-aero-rad_sec</property>
           <value>-0.3</value>
       </product>
    </function>

    <function name="aero/moment/Yaw_rudder">
       <description>Yaw moment due to rudder</description>
       <product>
           <property>aero/qbar-psf</property>
           <property>metrics/Sw-sqft</property>
           <property>metrics/bw-ft</property>
           <property>fcs/rudder-pos-rad</property>
           <value>-0.2</value>
           <property>aero/tail-blanking</property>
       </product>
    </function>

    <function name="aero/moment/Yaw_aileron">
       <description>Adverse yaw</description>
       <product>
           <property>aero/qbar-psf</property>
           <property>metrics/Sw-sqft</property>
           <property>metrics/bw-ft</property>
           <property>fcs/left-aileron-pos-rad</property>
           <value>0</value>
       </product>
    </function>

  </axis>

 </aerodynamics>

</fdm_config>
